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/batch
! ANSYS input file written by Workbench version 2026 R1
! File used for geometry attach: C:\Users\lukea\AppData\Local\Temp\WB_lukea_50600_2\wbnew_files\dp0\SYS\DM\SYS.scdocx
/title,wbnew--Magnetostatic (A5)
/com,--- Data in consistent MKS units. See Solving Units in the help system for more information.
/units,MKS
/prep7
! Turn off shape checking because checks already performed inside WB mesher.
! See help system for more information.
SHPP,OFF,,NOWARN
etcon,set             ! allow ANSYS to choose best KEYOP's for 180x elements, resets any applicable keyopt to MAPDL defaults
/com,*********** Send User Defined Coordinate System(s) ***********
local,12,1,4.26301924040627e-016,4.61613374481753e-017,-2.92762007934541e-017,0.,0.,0.
csys,0
/com,*********** Nodes for the whole assembly ***********
nblock,3,,74639
(1i9,3e20.9e3)
        1     4.000020790E+01     4.000020790E+01    -3.149830103E+01
        2     4.000020790E+01    -4.000020790E+01    -3.149830103E+01
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-1
/com,*********** Elements for Body 1 'Solid' ***********
et,1,117
MAT,1 $ TYPE,1 $ REAL,1 $ SECNUM,1 $ ESYS,12    ! ELEMNODES = 20
eblock,21,COMPACT,,474
(21i9)
        1      547     5213      601      601      593      593      593      593    13002    13569      601    12995      593      593      593      593    12994    13499    13496    13496
        2      588      601     5213     5213      593      593      593      593    13452    13569     5213    13455      593      593      593      593    13451    13496    13499    13499
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-1
secnum,1    ! reset the section ID to default
/com,*********** Elements for Body 2 'Enclosure\Enclosure' ***********
et,2,117
MAT,2 $ TYPE,2 $ REAL,1 $ SECNUM,2 $ ESYS,0    ! ELEMNODES = 20
eblock,21,COMPACT,,42558
(21i9)
      475     2477     9901     2586     2586     7384     7384     7384     7384    25730    26207     2586    25723     7384     7384     7384     7384    25727    59140    26204    26204
      476     2199     9901     2586     2586     2477     2477     2477     2477    23939    26207     2586    23936     2477     2477     2477     2477    23935    25730    25723    25723
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-1
secnum,1    ! reset the section ID to default
toffst,273.15,      ! Temperature offset from absolute zero
/com,*********** Set Reference Temperature ***********
tref,22.
/com,*********** Send Materials ***********
MP,DENS,1,8300,	! kg m^-3
MPTEMP,,,,,,,,
MPTEMP,1,0
MPTEMP,2,20
MPTEMP,3,100
MPDATA,RSVX,1, ,1.548e-08,1.694e-08,2.277e-08,	! kg m^3 A^-2 s^-3
MPTEMP,,,,,,,,
MP,MURX,1,1,

MP,DENS,2,1.225,	! kg m^-3
MP,MURX,2,1,

!************************* Model Summary ********************
! Solid,	Copper Alloy,	matid,	1
! Enclosure\Enclosure,	Air,	matid,	2
!************************* End Model Summary ********************
/com,*********** Set KEYOP for Solid Conductors ***********
keyo,1,1,0
/com,*********** Create FluxPar ***********
CMBLOCK,_CM38   ,NODE,     7264
(8i10)
         1      -496       659     -5185      9902     -9912      9914     -9918
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d,_CM38,az,0
nsel,all
/com,*********** Create Coil Current ***********
esel,none
esel,a,type,,1
cm,_CM36,elem
esel,all

*DIM,_loadvari36,TABLE,2,1,1,TIME, , , 0
! Time values
*TAXIS,_loadvari36(1),1,0.,1.
! Load values
_loadvari36(1,1,1) = 0.
_loadvari36(2,1,1) = 14154.2816702052


emid,straight     ! straighten miside nodes
fini
/com,****************************************************************************
/com,*************************    SOLUTION       ********************************
/com,****************************************************************************
/solu
!eqsl,sparse               ! using sparse solver which is default so no eqsl command needed
outres,all,all
/com,****************************************************
/com,******************* SOLVE FOR LS 1 ****************
bfe,_CM36,js,2,%_loadvari36%
autots,on                  ! Workbench turned on automatic time stepping
nsub,1,10,1               ! Workbench default program controlled option
time,1.
outres,erase
outres,all,none
outres,all,all
cnvtol,csg,,,,1e-6                     ! program controlled option
! *********** WB SOLVE COMMAND ***********
! check interactive state
*get,ANSINTER_,active,,int
*if,ANSINTER_,ne,0,then
/eof
*endif
solve
/com *************** Write FE CONNECTORS *********
CEWRITE,file,ce,,INTE
/com,****************************************************
/com,*************** FINISHED SOLVE FOR LS 1 *************
fini
/post1
fini
